# OpenSim document version 30000
Model:
  ForceSet:
    Millard2012EquilibriumMuscle [values shared by the 5 below unless stated]: max_isometric_force=100
        optimal_fiber_length=0.8 tendon_slack_length=0.2 pennation_angle_at_optimal=0 [radians] default_fiber_length=1
    Millard2012EquilibriumMuscle the_muscleFBR: min_control=0 max_control=1
      PathPoint muscle1-point1: body (0.9 0.5 0)
      PathPoint muscle1-point2: right_humerus (0 0 -0.3)
      # activation dynamics model with a lower bound
    Millard2012EquilibriumMuscle the_muscleFBL:
      PathPoint muscle1-point1: body (-0.9 0.5 0)
      PathPoint muscle1-point2: left_humerus (0 0 -0.3)
      # activation dynamics model with a lower bound
    Millard2012EquilibriumMuscle the_muscleBFL:
      PathPoint muscle1-point1: body (-0.8 -0.5 0)
      PathPoint muscle1-point2: left_femur (0 0 -0.3)
      # activation dynamics model with a lower bound
    Millard2012AccelerationMuscle the_muscleBFR: max_isometric_force=100 optimal_fiber_length=0.8
        tendon_slack_length=0.2 pennation_angle_at_optimal=0 [radians] default_fiber_length=1
      PathPoint muscle1-point1: body (0.8 -0.5 0)
      PathPoint muscle1-point2: right_femur (0 0 -0.3)
      MuscleFirstOrderActivationDynamicModel:
        minimum_activation: 0.1
    Millard2012EquilibriumMuscle the_muscleFFR:
      PathPoint muscle1-point1: body (0.8 1.3 0)
      PathPoint muscle1-point2: right_humerus (0 0 -0.3)
      # activation dynamics model with a lower bound
    Millard2012EquilibriumMuscle the_muscleFFL:
      PathPoint muscle1-point1: body (-0.8 1.3 0)
      PathPoint muscle1-point2: left_humerus (0 0 -0.3)
      # activation dynamics model with a lower bound
    RigidTendonMuscle the_muscleBBL: max_isometric_force=100 optimal_fiber_length=0.8 tendon_slack_length=0.2
      PathPoint muscle1-point1: body (-0.8 -1.3 0)
      PathPoint muscle1-point2: left_femur (0 0 -0.3)
    Thelen2003Muscle the_muscleBBR: max_isometric_force=100 optimal_fiber_length=0.8 tendon_slack_length=0.2
        pennation_angle_at_optimal=0 [radians]
      PathPoint muscle1-point1: body (0.8 -1.3 0)
      PathPoint muscle1-point2: right_femur (0 0 -0.3)
